<neuroml xmlns="http://www.neuroml.org/schema/neuroml2"  xmlns:xs="http://www.w3.org/2001/XMLSchema" xmlns:xsi="http://www.w3.org/2001/XMLSchema-instance" xsi:schemaLocation="http://www.neuroml.org/schema/neuroml2 https://raw.github.com/NeuroML/NeuroML2/development/Schemas/NeuroML2/NeuroML_v2.3.xsd" id="cell">
    <notes>Layer 5 Pyramidal cell</notes>
    <include href="nat.channel.nml"/>
    <include href="pas.channel.nml"/>
    <include href="kfast.channel.nml"/>
    <include href="kslow.channel.nml"/>
    <include href="nap.channel.nml"/>
    <include href="IKM.channel.nml"/>
    <include href="ih.channel.nml"/>
    <cell id="pyr">
        <morphology id="morphology">
            <segment id="0" name="Seg0_soma">
                <proximal x="0.0" y="0.0" z="0.0" diameter="23.1453"/>
                <distal x="11.5726" y="0.0" z="0.0" diameter="23.1453"/>
            </segment>
            <segment id="1" name="Seg1_soma">
                <parent segment="0"/>
                <distal x="23.1453" y="0.0" z="0.0" diameter="23.1453"/>
            </segment>
            <segment id="2" name="Seg0_basal">
                <parent segment="0"/>
                <proximal x="11.5726" y="0.0" z="0.0" diameter="8.74536"/>
                <distal x="11.5726" y="128.5" z="0.0" diameter="8.74536"/>
            </segment>
            <segment id="3" name="Seg1_basal">
                <parent segment="2"/>
                <distal x="11.5726" y="257.0" z="0.0" diameter="8.74536"/>
            </segment>
            <segment id="4" name="Seg0_apical">
                <parent segment="1"/>
                <proximal x="23.1453" y="0.0" z="0.0" diameter="5.92845"/>
                <distal x="73.1453" y="0.0" z="0.0" diameter="5.92845"/>
            </segment>
            <segment id="5" name="Seg1_apical">
                <parent segment="4"/>
                <distal x="173.145" y="0.0" z="0.0" diameter="5.92845"/>
            </segment>
            <segment id="6" name="Seg2_apical">
                <parent segment="5"/>
                <distal x="273.145" y="0.0" z="0.0" diameter="5.92845"/>
            </segment>
            <segment id="7" name="Seg3_apical">
                <parent segment="6"/>
                <distal x="373.145" y="0.0" z="0.0" diameter="5.92845"/>
            </segment>
            <segment id="8" name="Seg4_apical">
                <parent segment="7"/>
                <distal x="473.145" y="0.0" z="0.0" diameter="5.92845"/>
            </segment>
            <segment id="9" name="Seg5_apical">
                <parent segment="8"/>
                <distal x="523.145" y="0.0" z="0.0" diameter="5.92845"/>
            </segment>
            <segment id="10" name="Seg0_tuft">
                <parent segment="9"/>
                <proximal x="523.145" y="0.0" z="0.0" diameter="6.01807"/>
                <distal x="647.895" y="0.0" z="0.0" diameter="6.01807"/>
            </segment>
            <segment id="11" name="Seg1_tuft">
                <parent segment="10"/>
                <distal x="897.395" y="0.0" z="0.0" diameter="6.01807"/>
            </segment>
            <segment id="12" name="Seg2_tuft">
                <parent segment="11"/>
                <distal x="1022.15" y="0.0" z="0.0" diameter="6.01807"/>
            </segment>
            <segmentGroup id="all">
                <member segment="0"/>
                <member segment="1"/>
                <member segment="2"/>
                <member segment="3"/>
                <member segment="4"/>
                <member segment="5"/>
                <member segment="6"/>
                <member segment="7"/>
                <member segment="8"/>
                <member segment="9"/>
                <member segment="10"/>
                <member segment="11"/>
                <member segment="12"/>
            </segmentGroup>
            <segmentGroup neuroLexId="GO:0043025" id="soma_group">
                <notes>Default soma segment group for the cell</notes>
                <member segment="0"/>
                <member segment="1"/>
                <include segmentGroup="soma_0"/>
            </segmentGroup>
            <segmentGroup neuroLexId="GO:0030424" id="axon_group">
                <notes>Default axon segment group for the cell</notes>
            </segmentGroup>
            <segmentGroup neuroLexId="GO:0030425" id="dendrite_group">
                <notes>Default dendrite segment group for the cell</notes>
            </segmentGroup>
            <segmentGroup neuroLexId="sao864921383" id="soma_0">
                <member segment="0"/>
                <member segment="1"/>
            </segmentGroup>
            <segmentGroup neuroLexId="sao864921383" id="basal">
                <member segment="2"/>
                <member segment="3"/>
            </segmentGroup>
            <segmentGroup neuroLexId="sao864921383" id="apical">
                <property tag="numberInternalDivisions" value="5"/>
                <member segment="4"/>
                <member segment="5"/>
                <member segment="6"/>
                <member segment="7"/>
                <member segment="8"/>
                <member segment="9"/>
            </segmentGroup>
            <segmentGroup neuroLexId="sao864921383" id="tuft">
                <property tag="numberInternalDivisions" value="2"/>
                <member segment="10"/>
                <member segment="11"/>
                <member segment="12"/>
            </segmentGroup>
            <segmentGroup id="axosomatic_list">
                <include segmentGroup="soma_0"/>
                <include segmentGroup="basal"/>
            </segmentGroup>
            <segmentGroup id="apicaltree_list">
                <include segmentGroup="apical"/>
                <include segmentGroup="tuft"/>
            </segmentGroup>
            <segmentGroup id="basal_group">
                <include segmentGroup="basal"/>
            </segmentGroup>
            <segmentGroup id="apical_group">
                <include segmentGroup="apical"/>
            </segmentGroup>
            <segmentGroup id="tuft_group">
                <include segmentGroup="tuft"/>
            </segmentGroup>
        </morphology>
        <biophysicalProperties id="biophys">
            <membraneProperties>
                <channelDensity id="axosomatic_gpas" ionChannel="pas" condDensity="0.485726 S_per_m2" erev="-80.3987 mV" segmentGroup="axosomatic_list" ion="non_specific"/>
                <channelDensity id="apicaltree_gpas" ionChannel="pas" condDensity="0.381196 S_per_m2" erev="-80.3987 mV" segmentGroup="apicaltree_list" ion="non_specific"/>
                <channelDensity id="kfast_soma" ionChannel="kfast" condDensity="67.197508 S_per_m2" erev="-80mV" segmentGroup="soma_group" ion="k"/>
                <channelDensity id="kslow_soma" ionChannel="kslow" condDensity="475.82 S_per_m2" erev="-80mV" segmentGroup="soma_group" ion="k"/>
                <channelDensity id="nap_soma" ionChannel="nap" condDensity="1.44 S_per_m2" erev="55mV" segmentGroup="soma_group" ion="na"/>
                <channelDensity id="km_soma" ionChannel="km" condDensity="10.459916 S_per_m2" erev="-80mV" segmentGroup="soma_group" ion="k"/>
                <channelDensity id="ih_basal" ionChannel="ih" condDensity="11.04 S_per_m2" erev="-47mV" segmentGroup="basal_group" ion="hcn"/>
                <channelDensityVShift id="nat_soma" ionChannel="nat" condDensity="236.616175 S_per_m2" erev="55 mV" segmentGroup="soma_group" ion="na" vShift="10mV"/>
                <spikeThresh value="-20mV"/>
                <specificCapacitance value="2.23041 uF_per_cm2" segmentGroup="axosomatic_list"/>
                <specificCapacitance value="1.750419 uF_per_cm2" segmentGroup="apicaltree_list"/>
                <initMembPotential value="-67mV"/>
            </membraneProperties>
            <intracellularProperties>
                <resistivity value="0.082 kohm_cm" segmentGroup="soma_group"/>
                <resistivity value="0.734 kohm_cm" segmentGroup="basal_group"/>
                <resistivity value="0.527 kohm_cm" segmentGroup="tuft_group"/>
                <resistivity value="0.3822 kohm_cm" segmentGroup="apical_group"/>
            </intracellularProperties>
        </biophysicalProperties>
    </cell>
</neuroml>
